# Bsp. 5) Wiederholungsaufgaben Differentialrechnung, Kurvendiskussion
f(x) := 10*(sqrt(x) - 2)^2/x
f'(x) := d/dx(f(x)) simplify → 20*(sqrt(x) - 2)/x^2
f''(x) := d^2/dx^2(f(x)) simplify → 80/x^3 - 30/x^(5/2)
# Nullstellen:
f(x) == 0 solve → 4  # N(4/0)  # Lösungen als Punkte angeben!
# Extremstellen:
f'(x) == 0 solve → 4
f(4) = 0  # E(4/0)
f''(4) = 0.3125  # >0 =>  # Tiefpunkt T(4/0)
# Wendepunkte:
f''(x) == 0 solve → 64/9 = 7.11111
f(64/9) = 0.625  # W(7,111/0,625)
# Graph:
# [plot: f(x) vs x]
# Bsp. 4) Wh.-aufg. Differentialrechnung, Umkehraufgabe
f(x) := a*x^3 + b*x^2 + c*x + d  # error: Diese Variable ist nicht definiert. Prüfen Sie, ob die Beschriftung richtig festgelegt ist.
f'(x) := d^1/dx^1(f(x)) → 3*a*x^2 + 2*b*x + c
f''(x) := d^2/dx^2(f(x)) → 2*b + 6*a*x
# a)
[f(2) == 1; f(1) == 2; f''(1) == 0; f'(1) == 1] → [8*a + 4*b + 2*c + d == 1; a + b + c + d == 2; 6*a + 2*b == 0; 3*a + 2*b + c == 1]
# Das Gleichungssystem sollte hier zu sehen sein! War explizit gefragt!
# b)
# Am Anfang kann eine Matrix als Zeilenvektor definiert werden, um auf die Komponenten des Lösungsvektors zugreifen zu können.
[a, b, c, d] := [f(2) == 1; f(1) == 2; f''(1) == 0; f'(1) == 1] solve, a, b, c, d → [-2, 6, -5, 3]
f(x) := a*x^3 + b*x^2 + c*x + d
f(x) → 6*x^2 - 2*x^3 - 5*x + 3
