# Extremwertaufgaben
# Bsp. 4.72c) Timischl, Ing.-Math. 3
# Hydraulisch günstiger Kanalquerschnitt in Form eines Rechtecks mit aufgesetztem Halbkreis
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# Vorgaben: A = 1 m²
A := 1
# aus der Skizze ist zu erkennen: r = x/2
r := x/2  # error: Diese Variable ist nicht definiert. Prüfen Sie, ob die Beschriftung richtig festgelegt ist.
# 1. HB formulieren: Der Umfang soll minimal werden. U --> Min.
u(x, y) := x + 2*y + r*π → x + 2*y + π*x/2  # Nachdem u von 2 Variablen abhängt, braucht man die NB.
# 2. NB formulieren: Der Flächeninhalt des Querschnitts ist mit 1 m² vorgegeben.
A == x*y + r^2*π/2 → 1 == π*x^2/8 + y*x solve, y → -(π*x^2 - 8)/(8*x) simplify → 1/x - π*x/8
# Aus der NB wurde zweckmäßigerweise die Variable y ausgedrückt. Warum?
# y kommt in der HB nur einmal vor; x kommt in der NB linear und quadratisch vor.
# 3. NB --> HB (NB in die HB einsetzen, damit ist der Umfang nur noch von einer Variablen (x) abhängig.)
u(x) := x + 2*(1/x - π*x/8) + π*x/2 → x + π*x/4 + 2/x simplify → x*(π/4 + 1) + 2/x
# 4. Von dieser Fkt. u(x) wollen wir die lokalen Extremwerte berechnen. Also brauchen wir die 1. Ableitung u'(x). Diese wird gleich null gesetzt und diese Gleichung nach x gelöst. Mit der 2. Abl. wird überprüft, ob ein lokales Minimum vorliegt.
u'(x) := d^1/dx^1(u(x)) simplify → π/4 - 2/x^2 + 1
u'(x) == 0 solve, x → [2*sqrt(2)/sqrt(π + 4); -2*sqrt(2)/sqrt(π + 4)] = [1.05839; -1.05839]
u''(x) := d^2/dx^2(u(x)) → 4/x^3  # Die 2. Abl. ist für positive x-Werte immer > 0.
# 5. Antwort und Interpretation (Beziehung zwischen x und y; weitere Größen berechnen und vergleichen)
# Der minimale Umfang wird bei x = 1,058 m erreicht und beträgt dann ca. 3,78 m.
u_min := u(1.058) = 3.77931
x := 2*sqrt(2)/sqrt(π + 4)
y := 1/x - π*x/8
y simplify → sqrt(2)/sqrt(π + 4)
# Die Seite y ist also halb so lang wie die Seite x.
# Oder anders ausgedrückt: Die Gesamthöhe des Kanalquerschnitts ist gleich der Breite!
x = 1.05839
y = 0.529197
# 6. Graphische Darstellung der Umfangfunktion u(x) (Zum Verständnis)
clear(x)
# [plot: u(x) vs x]
u(x) := x*(π/4 + 1) + 2/x
