# Integralrechnung mit Mathcad
# Unbestimmtes Integral (Ermitteln einer Stammfunktion)
f(x) := 5*x^3 - 8*x + 9  # Zunächst muss eine Funktion - hier f(x) - definiert werden.
# Den Integrationsoperator " " findet man unter Rechnen in der Palette Operatoren. (Tastenkombination für  das Integrieren ist: "Strg Shift I".) Entsprechende Felder sind mit dem Namen der Funktion und der Integrationsvariablen auszufüllen (wie beim Differenzieren). Die Felder für die Integrationsgrenzen bleiben frei. Mit "Strg ." symbolisch auswerten.
integral(f(x), x) → 5*x^4/4 - 4*x^2 + 9*x
# ACHTUNG:
# Mathcad erzeugt dabei aber keine Integrationskonstante C!
integral(f(x), x) + C → 5*x^4/4 - 4*x^2 + 9*x + C
# Es ist daher von Vorteil, diese bereits nach dem dx selbst anzufügen, um damit eventuell später eine spezielle Lösung ermitteln zu können.
# Damit lassen sich natürlich auch kompliziertere Fkt. integrieren.
f(t) := t*e^t
integral(f(t), t) + C → C + e^t*(t - 1)
f(t) := 1/t
integral(f(t), t) → ln(t)
integral(sin(t)*cos(2*t), t) + C → C - cos(3*t)/6 + cos(t)/2  # Man kann auch die - nicht zuvor definierte Fkt. - direkt nach dem Integralzeichen eingeben.
# Jedenfalls könnt ihr damit auch eure händisch ermittelten Ergebnisse kontrollieren. Das letzte Bsp. ist die Nr. 6.52 b) aus eurem Buch.
# Bestimmtes Integral
# Funktioniert genauso wie oben beschrieben, nur müssen zusätzlich die Integrationsgrenzen (Untergrenze a und Obergrenze b) eingegeben werden.
f(x) := 1/2*x^2
# Hierbei ist keine Integrationskonstante nötig! Das Ergebnis ist ein (Zahlen-)Wert, der in diesem Fall dem Flächeninhalt zwischen der Kurve und der x-Achse ("unterhalb der Kurve") im Intervall [1; 4] entspricht.
integral(f(x), x = 1 .. 4) → 21/2
# [plot: f(x) vs x]
# Das heißt, bei einer Zeicheneinheit von 1 cm hat dieser Flächeninhalt einen Wert von 10,5 cm².
# Die optisch schönere Darstellung liefert wieder einmal Geogebra.
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# Das funktioniert dort auch recht simpel. Nachdem die Fkt. definiert und gezeichnet wurde, liefert der Eingabebefehl Integral [Funktion, Startwert, Endwert] den numerisch berechneten Wert des bestimmten Integrals und stellt die Fläche zwischen dem Funktionsgraphen und der x-Achse sofort dar.
# Auch Ober- und Untersummen lassen sich in Geogebra sehr einfach berechnen und darstellen. Eingabebefehl Untersumme[Funktion, Startwert, Endwert, Anzahl der Rechtecke] bzw. Obersumme[Funktion, Startwert, Endwert, Anzahl der Rechtecke].
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# 3 Teilintervalle, (Rechteckbreite 1 Einheit)
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# 12 Teilintervalle, (Rechteckbreite 0,25 Einheiten)
# Bei Funktionsgraphen, die im betrachteten Intervall sowohl steigend als auch fallend sind, wird in Geogebra für jedes Teilintervall tatsächlich immer das Minimum (bei der Untersumme) bzw. das Maximum (bei der Obersumme) berechnet - wie sich das gehört.
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# Diesbezüglich muss man in Mathcad der Monotonie entsprechend unterscheiden. Das heißt, man sollte zuvor etwa anhand der Graphik feststellen, wie die Funktion im betrachteten Intervall verläuft und die Ober- bzw. Untersumme abschnittsweise den Monotonieintervallen entsprechend getrennt berechnen.
# Ober- und Untersummen mit Mathcad
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# monoton
# steigender
# Abschnitt
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# monoton
# fallender
# Abschnitt
integral(25 - t^2, t = 0 .. 4) → 236/3 = 78.6667
# Das bestimmte Integral liefert den genauen Wert des Weges in den ersten 4 Sekunden. Je größer die Anzahl der Teilintervalle der Ober- und Untersummen wird (je schmäler die Rechtecke werden), desto genauer nähern sich die berechneten Summenwerte von oben und von unten an.
# Merke: Das bestimmte Integral einer Funktion ist eine Summe - genauer, der Grenzwert der Ober- und Untersummen einer Funktion in einem Intervall für unendlich viele Teilintervalle (n ->∞) bzw. für unendlich klein werdende Rechteckbreiten (Δx -> 0).
